// SBML level 3 version 2

model OxidativeModule()

  // Compartments:
  compartment cell = 1 MWBUILTINUNIT_liter;

  // Species:
  species cell_TIP_ox in cell = 0;  // substance in MWDERIVEDUNIT_nanomolarity_liter

  // Parameters:
  S_ox = 0 MWBUILTINPREFIX_micro_MWBUILTINUNIT_molarity;
  EC50_ox = 271 MWBUILTINPREFIX_micro_MWBUILTINUNIT_molarity;
  n_ox = 1.7 dimensionless;
  beta_basal_ox = 5 MWDERIVEDUNIT_nanomolarity__hour;
  beta_max_ox = 25 MWDERIVEDUNIT_nanomolarity__hour;
  k_deg_TIP = 1 MWDERIVEDUNIT_1__hour;
  mu = 0.35 MWDERIVEDUNIT_1__hour;

  // Reactions:
  Reaction_1: => cell_TIP_ox; (beta_basal_ox + (beta_max_ox - beta_basal_ox)*(S_ox/EC50_ox)^n_ox/(1 + (S_ox/EC50_ox)^n_ox))*cell;
  Reaction_2: cell_TIP_ox => ; (k_deg_TIP + mu)*cell_TIP_ox*cell;

  // Unit definitions:
  unit MWBUILTINUNIT_liter = metre^3 * 1e-3 dimensionless;
  unit MWBUILTINPREFIX_nano_MWBUILTINUNIT_molarity = mole * 1e-6 dimensionless / metre^3; MWBUILTINPREFIX_nano_MWBUILTINUNIT_molarity is "nanomolarity";
  unit MWDERIVEDUNIT_nanomolarity_liter = 1e-9 mole; MWDERIVEDUNIT_nanomolarity_liter is "(nanomolarity)*(liter)";
  unit MWBUILTINPREFIX_micro_MWBUILTINUNIT_molarity = mole * 1e-3 dimensionless / metre^3; MWBUILTINPREFIX_micro_MWBUILTINUNIT_molarity is "micromolarity";
  unit MWDERIVEDUNIT_nanomolarity__hour = mole * 2.777778e-10 dimensionless / (metre^3 * second); MWDERIVEDUNIT_nanomolarity__hour is "nanomolarity/hour";
  unit MWDERIVEDUNIT_1__hour = 2.777778e-4 dimensionless / second; MWDERIVEDUNIT_1__hour is "1/hour";
end
