// SBML level 3 version 2

model ReporterModule()

  // Compartments:
  compartment cell = 1 MWBUILTINUNIT_liter;

  // Species:
  species cell_Reporter_dark_green in cell = 0;  // substance in MWDERIVEDUNIT_nanomolarity_liter
  species cell_Reporter_green in cell = 0;  // substance in MWDERIVEDUNIT_nanomolarity_liter
  species cell_Reporter_dark_red in cell = 0;  // substance in MWDERIVEDUNIT_nanomolarity_liter
  species cell_Reporter_intermediate in cell = 0;  // substance in MWDERIVEDUNIT_nanomolarity_liter
  species cell_Reporter_red in cell = 0;  // substance in MWDERIVEDUNIT_nanomolarity_liter

  // Parameters:
  P = 0.5 dimensionless;
  a_Reporter = 50 MWDERIVEDUNIT_nanomolarity__hour;
  m = 7.39 MWDERIVEDUNIT_1__hour;
  m1 = 2.46 MWDERIVEDUNIT_1__hour;
  m2 = 1.37 MWDERIVEDUNIT_1__hour;
  k_deg_Reporter = 0.01 MWDERIVEDUNIT_1__hour;
  mu = 0.35 MWDERIVEDUNIT_1__hour;
  E = 0.173 dimensionless;
  f = 1 dimensionless;
  Total_red_pool has MWBUILTINPREFIX_nano_MWBUILTINUNIT_molarity;
  b_fret has dimensionless;
  Observed_Green has MWBUILTINPREFIX_nano_MWBUILTINUNIT_molarity;
  Ratio_RG_FRET has dimensionless;
  Measured_Ratio_RG has dimensionless;
  eps = 1e-9 MWBUILTINPREFIX_nano_MWBUILTINUNIT_molarity;

  // Assignment rules:
  Total_red_pool := cell_Reporter_dark_red + cell_Reporter_intermediate + cell_Reporter_red;
  b_fret := cell_Reporter_red/(Total_red_pool + eps);
  Observed_Green := cell_Reporter_green*(1 - b_fret*E);
  Ratio_RG_FRET := cell_Reporter_red/(Observed_Green + eps);
  Measured_Ratio_RG := f*Ratio_RG_FRET;

  // Reactions:
  Reaction_1: => cell_Reporter_dark_green; a_Reporter*P*cell;
  Reaction_2: cell_Reporter_dark_green => cell_Reporter_green; m*cell_Reporter_dark_green*cell;
  Reaction_3: cell_Reporter_dark_green => ; (k_deg_Reporter + mu)*cell_Reporter_dark_green*cell;
  Reaction_4: cell_Reporter_green => ; (k_deg_Reporter + mu)*cell_Reporter_green*cell;
  Reaction_5: => cell_Reporter_dark_red; a_Reporter*P*cell;
  Reaction_6: cell_Reporter_dark_red => cell_Reporter_intermediate; m1*cell_Reporter_dark_red*cell;
  Reaction_7: cell_Reporter_intermediate => cell_Reporter_red; m2*cell_Reporter_intermediate*cell;
  Reaction_8: cell_Reporter_dark_red => ; (k_deg_Reporter + mu)*cell_Reporter_dark_red*cell;
  Reaction_9: cell_Reporter_intermediate => ; (k_deg_Reporter + mu)*cell_Reporter_intermediate*cell;
  Reaction_10: cell_Reporter_red => ; (k_deg_Reporter + mu)*cell_Reporter_red*cell;

  // Unit definitions:
  unit MWBUILTINUNIT_liter = metre^3 * 1e-3 dimensionless;
  unit MWBUILTINPREFIX_nano_MWBUILTINUNIT_molarity = mole * 1e-6 dimensionless / metre^3; MWBUILTINPREFIX_nano_MWBUILTINUNIT_molarity is "nanomolarity";
  unit MWDERIVEDUNIT_nanomolarity_liter = 1e-9 mole; MWDERIVEDUNIT_nanomolarity_liter is "(nanomolarity)*(liter)";
  unit MWDERIVEDUNIT_nanomolarity__hour = mole * 2.777778e-10 dimensionless / (metre^3 * second); MWDERIVEDUNIT_nanomolarity__hour is "nanomolarity/hour";
  unit MWDERIVEDUNIT_1__hour = 2.777778e-4 dimensionless / second; MWDERIVEDUNIT_1__hour is "1/hour";
end
