// SBML level 2 version 4

model TIP_TetR_binding()
  // TIP_TetR_binding

  // Compartments:
  compartment cell = 1 MWBUILTINUNIT_liter;

  // Species:
  species TetR_active in cell = 0;  // substance in MWDERIVEDUNIT_nanomole__liter_liter
  species TIP in cell = 0;  // substance in MWDERIVEDUNIT_nanomole__liter_liter
  species TetR_TIP_complex in cell = 0;  // substance in MWDERIVEDUNIT_nanomole__liter_liter
  species cell_Reporter_dark_green in cell = 0;
  species cell_Reporter_green in cell = 0;
  species cell_Reporter_dark_red in cell = 0;
  species cell_Reporter_intermediate in cell = 0;
  species cell_Reporter_red in cell = 0;

  // Parameters:
  b = 4 MWDERIVEDUNIT_1__nanomole__liter__hour;
  u_w = 1 MWDERIVEDUNIT_1__hour;
  delta_w = 0.12 MWDERIVEDUNIT_1__hour;
  a_TetR = 50 MWDERIVEDUNIT_nanomole__liter__hour;
  k_deg_TetR = 0.12 MWDERIVEDUNIT_1__hour;
  K_R = 0.44 MWDERIVEDUNIT_nanomole__liter;
  n = 4 dimensionless;
  P has dimensionless;
  P_min = 0.0056 dimensionless;
  mu = 0.35 MWDERIVEDUNIT_1__hour;
  S_ox = 0;
  EC50_ox = 271;
  n_ox = 1.7;
  beta_basal_ox = 5;
  beta_max_ox = 25;
  k_deg_TIP = 1;
  a_Reporter = 50;
  m = 7.39;
  m1 = 2.46;
  m2 = 1.37;
  k_deg_Reporter = 0.01;
  E = 0.173;
  f = 1;
  eps = 1e-9;

  // Assignment rules:
  P := P_min + (1 - P_min)*(1/(1 + (TetR_active/K_R)^n));
  Total_red_pool := cell_Reporter_dark_red + cell_Reporter_intermediate + cell_Reporter_red;
  b_fret := cell_Reporter_red/(Total_red_pool + eps);
  Observed_Green := cell_Reporter_green*(1 - b_fret*E);
  Ratio_RG_FRET := cell_Reporter_red/(Observed_Green + eps);
  Measured_Ratio_RG := f*Ratio_RG_FRET;

  // Reactions:
  Reaction_1: TIP + TetR_active -> TetR_TIP_complex; (b*TIP*TetR_active - u_w*TetR_TIP_complex)*cell;
  Reaction_2: => TetR_active; a_TetR*P*cell;
  Reaction_3: TetR_active => ; (mu + k_deg_TetR)*TetR_active*cell;
  Reaction_5: TetR_TIP_complex => ; (delta_w + mu)*TetR_TIP_complex*cell;
  sensing_0_Reaction_1: => TIP; (beta_basal_ox + (beta_max_ox - beta_basal_ox)*(S_ox/EC50_ox)^n_ox/(1 + (S_ox/EC50_ox)^n_ox))*cell;
  sensing_1_Reaction_2: TIP => ; (k_deg_TIP + mu)*TIP*cell;
  reporter_0_Reaction_1: => cell_Reporter_dark_green; a_Reporter*P*cell;
  reporter_1_Reaction_2: cell_Reporter_dark_green => cell_Reporter_green; m*cell_Reporter_dark_green*cell;
  reporter_2_Reaction_3: cell_Reporter_dark_green => ; (k_deg_Reporter + mu)*cell_Reporter_dark_green*cell;
  reporter_3_Reaction_4: cell_Reporter_green => ; (k_deg_Reporter + mu)*cell_Reporter_green*cell;
  reporter_4_Reaction_5: => cell_Reporter_dark_red; a_Reporter*P*cell;
  reporter_5_Reaction_6: cell_Reporter_dark_red => cell_Reporter_intermediate; m1*cell_Reporter_dark_red*cell;
  reporter_6_Reaction_7: cell_Reporter_intermediate => cell_Reporter_red; m2*cell_Reporter_intermediate*cell;
  reporter_7_Reaction_8: cell_Reporter_dark_red => ; (k_deg_Reporter + mu)*cell_Reporter_dark_red*cell;
  reporter_8_Reaction_9: cell_Reporter_intermediate => ; (k_deg_Reporter + mu)*cell_Reporter_intermediate*cell;
  reporter_9_Reaction_10: cell_Reporter_red => ; (k_deg_Reporter + mu)*cell_Reporter_red*cell;

  // Unit definitions:
  unit MWBUILTINUNIT_liter = metre^3 * 1e-3 dimensionless;
  unit MWDERIVEDUNIT_nanomole__liter = mole * 1e-6 dimensionless / metre^3; MWDERIVEDUNIT_nanomole__liter is "nanomole/liter";
  unit MWDERIVEDUNIT_nanomole__liter_liter = 1e-9 mole; MWDERIVEDUNIT_nanomole__liter_liter is "(nanomole/liter)*(liter)";
  unit MWDERIVEDUNIT_1__nanomole__liter__hour = metre^3 * 277.7778 dimensionless / (mole * second); MWDERIVEDUNIT_1__nanomole__liter__hour is "1/(nanomole/liter)/hour";
  unit MWDERIVEDUNIT_1__hour = 2.777778e-4 dimensionless / second; MWDERIVEDUNIT_1__hour is "1/hour";
  unit MWDERIVEDUNIT_nanomole__liter__hour = mole * 2.777778e-10 dimensionless / (metre^3 * second); MWDERIVEDUNIT_nanomole__liter__hour is "nanomole/liter/hour";
end
